# Input file for Stack Fault Energy surface of Co
# --------------------- INITIALIZAITION ---------------------
clear
units		metal
dimension	3
boundary	p p p
atom_style	atomic
variable latparam1 equal 3.5642
variable x_displace equal -1*(${latparam1}/sqrt(6))
variable xdim equal ${latparam1}*sqrt(6)/2*6
variable ydim equal ${latparam1}*sqrt(2)/2*10
variable totlayer equal 12
variable cutlayer equal 6
variable zdim equal ${latparam1}/sqrt(3)*${totlayer}
variable zcut equal ${latparam1}/sqrt(3)*${cutlayer}+1.0

variable systemp equal TEMPERATURE

# --------------------- ATOM DEFINITION ---------------------
lattice		fcc ${latparam1}
region		1 block -.001 ${xdim} -.001 ${ydim} -.001 ${zcut} units box
region 		2 block -.001 ${xdim} -.001 ${ydim} ${zcut} ${zdim} units box
region		whole block 0 ${xdim} 0 ${ydim} 0 ${zdim} units box
#the -.001 in the -x and -y and lower limit of region 1 are only to overcome a simple numerical issue but can be considered 0
create_box 	2 whole
lattice fcc ${latparam1} orient x 1 1 2 orient y -1 1 0 orient z -1 -1 1
create_atoms	1 region 1
lattice fcc ${latparam1} orient x 1 1 2 orient y -1 1 0 orient z -1 -1 1
create_atoms 	2 region 2

# Creat a SF layer
group bot region 1
group top region 2
#displace_atoms top move ${x_displace} 0.0 0.0 units box

# --------------------- FORCE FIELDS ---------------------
# ---------- Define Interatomic Potential ---------------------
pair_style	eam/alloy
pair_coeff * * ../Co_PurjaPun_2012.eam.alloy Co

neighbor    0.3 bin                ## define parameters for neighbor list
neigh_modify    delay 0 every 1 check yes

# ---------- EQUILIBRATION -------------------------
reset_timestep    0
timestep 0.001                                         ## set timestep 0.001 ps
velocity all create ${systemp} 765896 mom yes rot yes

fix 1 all nph x 0.0 0.0 1.0 y 0.0 0.0 1.0 z 0.0 0.0 1.0
fix 2 all temp/csvr ${systemp} ${systemp} 0.1 534596
run 20000

thermo 10
thermo_style custom step temp pe enthalpy lx ly lz atoms press pxx pyy pzz pxy pyz pxz
run 50000000
